mmod(xx, yy) := xx - yy*floor(xx/yy)
x := 3 .. 23
Lav_torus(N) := N*sqrt(N)*mmod(sqrt(N) + 1, 2)/(2*(N - 1)) + sqrt(N)*mmod(sqrt(N), 2)/2
x = [3; 4; 5; 6; 7; 8; 9; 10; 11; 12; 13; 14; 15; 16; 17; 18; 19; 20; 21; 22; 23]
N(x) := x^2
N(x) = [9; 16; 25; 36; 49; 64; 81; 100; 121; 144; 169; 196; 225; 256; 289; 324; 361; 400; 441; 484; 529]
Lav_mesh(N) := (2*(N - 1))/(3*sqrt(N))
Lav_circ := [
    1.5; 1.55556; 1.6; 1.63636; 1.66667; 1.76923; 1.85714; 1.93333; 2; 2.05882
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]
Lav_ring := [
    1.5; 1.55556; 1.6; 1.72727; 1.66667; 1.76923; 1.85714; 1.93333; 2; 2.05882
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]
Lav_mesh(N(x)) = [1.77778; 2.5; 3.2; 3.88889; 4.57143; 5.25; 5.92593; 6.6; 7.27273; 7.94444; 8.61538; 9.28571; 9.95556; 10.625; 11.2941; 11.963; 12.6316; 13.3; 13.9683; 14.6364; 15.3043]
Lav_torus(N(x)) = [1.5; 2.13333; 2.5; 3.08571; 3.5; 4.06349; 4.5; 5.05051; 5.5; 6.04196; 6.5; 7.0359; 7.5; 8.03137; 8.5; 9.02786; 9.5; 10.0251; 10.5; 11.0228; 11.5]
Lav_ring = [
    1.5; 1.55556; 1.6; 1.72727; 1.66667; 1.76923; 1.85714; 1.93333; 2; 2.05882
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]
Lav_circ = [
    1.5; 1.55556; 1.6; 1.63636; 1.66667; 1.76923; 1.85714; 1.93333; 2; 2.05882
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]
z := 9 .. 529
z = [
    9; 10; 11; 12; 13; 14; 15; 16; 17; 18
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]
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a := 9 .. 81
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